<neuroml xmlns="http://www.neuroml.org/schema/neuroml2"  xmlns:xs="http://www.w3.org/2001/XMLSchema" xmlns:xsi="http://www.w3.org/2001/XMLSchema-instance" xsi:schemaLocation="http://www.neuroml.org/schema/neuroml2 https://raw.github.com/NeuroML/NeuroML2/development/Schemas/NeuroML2/NeuroML_v2beta5.xsd" id="RandomPopulation">
    <silentSynapse id="silent1"/>
    <pulseGenerator id="baseline_e" delay="0ms" duration="300ms" amplitude="147.2512 pA"/>
    <pulseGenerator id="baseline_pv" delay="0ms" duration="300ms" amplitude="386.7281 pA"/>
    <pulseGenerator id="baseline_sst" delay="0ms" duration="300ms" amplitude="40.2657 pA"/>
    <pulseGenerator id="baseline_vip" delay="0ms" duration="300ms" amplitude="98.4368 pA"/>
    <pulseGenerator id="modVIP" delay="100ms" duration="200ms" amplitude="10 pA"/>
    <network id="net2">
        <population id="ePop" component="E" size="200"/>
        <population id="pvPop" component="PV" size="25"/>
        <population id="sstPop" component="SST" size="12"/>
        <population id="vipPop" component="VIP" size="12"/>
        <continuousProjection id="e_e" presynapticPopulation="ePop" postsynapticPopulation="ePop">
            <continuousConnectionInstanceW id="0" preCell="../ePop[0]" preSegment="0" preFractionAlong="0.5" postCell="../ePop[90]" postSegment="0" postFractionAlong="0.5" preComponent="silent1" postComponent="rs" weight="0.605"/>
            <continuousConnectionInstanceW id="1" preCell="../ePop[0]" preSegment="0" preFractionAlong="0.5" postCell="../ePop[113]" postSegment="0" postFractionAlong="0.5" preComponent="silent1" postComponent="rs" weight="0.605"/>
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        </continuousProjection>
        <continuousProjection id="e_pv" presynapticPopulation="ePop" postsynapticPopulation="pvPop">
            <continuousConnectionInstanceW id="0" preCell="../ePop[2]" preSegment="0" preFractionAlong="0.5" postCell="../pvPop[14]" postSegment="0" postFractionAlong="0.5" preComponent="silent1" postComponent="rs" weight="1.485"/>
            <continuousConnectionInstanceW id="1" preCell="../ePop[9]" preSegment="0" preFractionAlong="0.5" postCell="../pvPop[9]" postSegment="0" postFractionAlong="0.5" preComponent="silent1" postComponent="rs" weight="1.485"/>
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        </continuousProjection>
        <continuousProjection id="e_sst" presynapticPopulation="ePop" postsynapticPopulation="sstPop">
            <continuousConnectionInstanceW id="0" preCell="../ePop[5]" preSegment="0" preFractionAlong="0.5" postCell="../sstPop[0]" postSegment="0" postFractionAlong="0.5" preComponent="silent1" postComponent="rs" weight="2.32"/>
            <continuousConnectionInstanceW id="1" preCell="../ePop[5]" preSegment="0" preFractionAlong="0.5" postCell="../sstPop[1]" postSegment="0" postFractionAlong="0.5" preComponent="silent1" postComponent="rs" weight="2.32"/>
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        </continuousProjection>
        <continuousProjection id="e_vip" presynapticPopulation="ePop" postsynapticPopulation="vipPop">
            <continuousConnectionInstanceW id="0" preCell="../ePop[4]" preSegment="0" preFractionAlong="0.5" postCell="../vipPop[0]" postSegment="0" postFractionAlong="0.5" preComponent="silent1" postComponent="rs" weight="0.355"/>
            <continuousConnectionInstanceW id="1" preCell="../ePop[11]" preSegment="0" preFractionAlong="0.5" postCell="../vipPop[5]" postSegment="0" postFractionAlong="0.5" preComponent="silent1" postComponent="rs" weight="0.355"/>
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        </continuousProjection>
        <continuousProjection id="pv_e" presynapticPopulation="pvPop" postsynapticPopulation="ePop">
            <continuousConnectionInstanceW id="0" preCell="../pvPop[0]" preSegment="0" preFractionAlong="0.5" postCell="../ePop[0]" postSegment="0" postFractionAlong="0.5" preComponent="silent1" postComponent="rs" weight="-0.00132"/>
            <continuousConnectionInstanceW id="1" preCell="../pvPop[0]" preSegment="0" preFractionAlong="0.5" postCell="../ePop[1]" postSegment="0" postFractionAlong="0.5" preComponent="silent1" postComponent="rs" weight="-0.00132"/>
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        </continuousProjection>
        <continuousProjection id="pv_pv" presynapticPopulation="pvPop" postsynapticPopulation="pvPop">
            <continuousConnectionInstanceW id="0" preCell="../pvPop[0]" preSegment="0" preFractionAlong="0.5" postCell="../pvPop[0]" postSegment="0" postFractionAlong="0.5" preComponent="silent1" postComponent="rs" weight="-0.138"/>
            <continuousConnectionInstanceW id="1" preCell="../pvPop[0]" preSegment="0" preFractionAlong="0.5" postCell="../pvPop[1]" postSegment="0" postFractionAlong="0.5" preComponent="silent1" postComponent="rs" weight="-0.138"/>
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        </continuousProjection>
        <continuousProjection id="pv_sst" presynapticPopulation="pvPop" postsynapticPopulation="sstPop"/>
        <continuousProjection id="pv_vip" presynapticPopulation="pvPop" postsynapticPopulation="vipPop"/>
        <continuousProjection id="sst_e" presynapticPopulation="sstPop" postsynapticPopulation="ePop">
            <continuousConnectionInstanceW id="0" preCell="../sstPop[0]" preSegment="0" preFractionAlong="0.5" postCell="../ePop[0]" postSegment="0" postFractionAlong="0.5" preComponent="silent1" postComponent="rs" weight="-0.066666666666667"/>
            <continuousConnectionInstanceW id="1" preCell="../sstPop[0]" preSegment="0" preFractionAlong="0.5" postCell="../ePop[1]" postSegment="0" postFractionAlong="0.5" preComponent="silent1" postComponent="rs" weight="-0.066666666666667"/>
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        </continuousProjection>
        <continuousProjection id="sst_pv" presynapticPopulation="sstPop" postsynapticPopulation="pvPop">
            <continuousConnectionInstanceW id="0" preCell="../sstPop[0]" preSegment="0" preFractionAlong="0.5" postCell="../pvPop[0]" postSegment="0" postFractionAlong="0.5" preComponent="silent1" postComponent="rs" weight="0.208823529411765"/>
            <continuousConnectionInstanceW id="1" preCell="../sstPop[0]" preSegment="0" preFractionAlong="0.5" postCell="../pvPop[2]" postSegment="0" postFractionAlong="0.5" preComponent="silent1" postComponent="rs" weight="0.208823529411765"/>
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        </continuousProjection>
        <continuousProjection id="sst_sst" presynapticPopulation="sstPop" postsynapticPopulation="sstPop"/>
        <continuousProjection id="sst_vip" presynapticPopulation="sstPop" postsynapticPopulation="vipPop">
            <continuousConnectionInstanceW id="0" preCell="../sstPop[0]" preSegment="0" preFractionAlong="0.5" postCell="../vipPop[1]" postSegment="0" postFractionAlong="0.5" preComponent="silent1" postComponent="rs" weight="-0.026666666666667"/>
            <continuousConnectionInstanceW id="1" preCell="../sstPop[0]" preSegment="0" preFractionAlong="0.5" postCell="../vipPop[4]" postSegment="0" postFractionAlong="0.5" preComponent="silent1" postComponent="rs" weight="-0.026666666666667"/>
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        </continuousProjection>
        <continuousProjection id="vip_e" presynapticPopulation="vipPop" postsynapticPopulation="ePop"/>
        <continuousProjection id="vip_pv" presynapticPopulation="vipPop" postsynapticPopulation="pvPop"/>
        <continuousProjection id="vip_sst" presynapticPopulation="vipPop" postsynapticPopulation="sstPop">
            <continuousConnectionInstanceW id="0" preCell="../vipPop[0]" preSegment="0" preFractionAlong="0.5" postCell="../sstPop[3]" postSegment="0" postFractionAlong="0.5" preComponent="silent1" postComponent="rs" weight="-0.422727272727273"/>
            <continuousConnectionInstanceW id="1" preCell="../vipPop[0]" preSegment="0" preFractionAlong="0.5" postCell="../sstPop[8]" postSegment="0" postFractionAlong="0.5" preComponent="silent1" postComponent="rs" weight="-0.422727272727273"/>
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        </continuousProjection>
        <continuousProjection id="vip_vip" presynapticPopulation="vipPop" postsynapticPopulation="vipPop"/>
        <explicitInput target="e[0]" input="baseline_e" destination="synapses"/>
        <explicitInput target="e[1]" input="baseline_e" destination="synapses"/>
        <explicitInput target="e[2]" input="baseline_e" destination="synapses"/>
        <explicitInput target="e[3]" input="baseline_e" destination="synapses"/>
        <explicitInput target="e[4]" input="baseline_e" destination="synapses"/>
        <explicitInput target="e[5]" input="baseline_e" destination="synapses"/>
        <explicitInput target="e[6]" input="baseline_e" destination="synapses"/>
        <explicitInput target="e[7]" input="baseline_e" destination="synapses"/>
        <explicitInput target="e[8]" input="baseline_e" destination="synapses"/>
        <explicitInput target="e[9]" input="baseline_e" destination="synapses"/>
        <explicitInput target="e[10]" input="baseline_e" destination="synapses"/>
        <explicitInput target="e[11]" input="baseline_e" destination="synapses"/>
        <explicitInput target="e[12]" input="baseline_e" destination="synapses"/>
        <explicitInput target="e[13]" input="baseline_e" destination="synapses"/>
        <explicitInput target="e[14]" input="baseline_e" destination="synapses"/>
        <explicitInput target="e[15]" input="baseline_e" destination="synapses"/>
        <explicitInput target="e[16]" input="baseline_e" destination="synapses"/>
        <explicitInput target="e[17]" input="baseline_e" destination="synapses"/>
        <explicitInput target="e[18]" input="baseline_e" destination="synapses"/>
        <explicitInput target="e[19]" input="baseline_e" destination="synapses"/>
        <explicitInput target="e[20]" input="baseline_e" destination="synapses"/>
        <explicitInput target="e[21]" input="baseline_e" destination="synapses"/>
        <explicitInput target="e[22]" input="baseline_e" destination="synapses"/>
        <explicitInput target="e[23]" input="baseline_e" destination="synapses"/>
        <explicitInput target="e[24]" input="baseline_e" destination="synapses"/>
        <explicitInput target="e[25]" input="baseline_e" destination="synapses"/>
        <explicitInput target="e[26]" input="baseline_e" destination="synapses"/>
        <explicitInput target="e[27]" input="baseline_e" destination="synapses"/>
        <explicitInput target="e[28]" input="baseline_e" destination="synapses"/>
        <explicitInput target="e[29]" input="baseline_e" destination="synapses"/>
        <explicitInput target="e[30]" input="baseline_e" destination="synapses"/>
        <explicitInput target="e[31]" input="baseline_e" destination="synapses"/>
        <explicitInput target="e[32]" input="baseline_e" destination="synapses"/>
        <explicitInput target="e[33]" input="baseline_e" destination="synapses"/>
        <explicitInput target="e[34]" input="baseline_e" destination="synapses"/>
        <explicitInput target="e[35]" input="baseline_e" destination="synapses"/>
        <explicitInput target="e[36]" input="baseline_e" destination="synapses"/>
        <explicitInput target="e[37]" input="baseline_e" destination="synapses"/>
        <explicitInput target="e[38]" input="baseline_e" destination="synapses"/>
        <explicitInput target="e[39]" input="baseline_e" destination="synapses"/>
        <explicitInput target="e[40]" input="baseline_e" destination="synapses"/>
        <explicitInput target="e[41]" input="baseline_e" destination="synapses"/>
        <explicitInput target="e[42]" input="baseline_e" destination="synapses"/>
        <explicitInput target="e[43]" input="baseline_e" destination="synapses"/>
        <explicitInput target="e[44]" input="baseline_e" destination="synapses"/>
        <explicitInput target="e[45]" input="baseline_e" destination="synapses"/>
        <explicitInput target="e[46]" input="baseline_e" destination="synapses"/>
        <explicitInput target="e[47]" input="baseline_e" destination="synapses"/>
        <explicitInput target="e[48]" input="baseline_e" destination="synapses"/>
        <explicitInput target="e[49]" input="baseline_e" destination="synapses"/>
        <explicitInput target="e[50]" input="baseline_e" destination="synapses"/>
        <explicitInput target="e[51]" input="baseline_e" destination="synapses"/>
        <explicitInput target="e[52]" input="baseline_e" destination="synapses"/>
        <explicitInput target="e[53]" input="baseline_e" destination="synapses"/>
        <explicitInput target="e[54]" input="baseline_e" destination="synapses"/>
        <explicitInput target="e[55]" input="baseline_e" destination="synapses"/>
        <explicitInput target="e[56]" input="baseline_e" destination="synapses"/>
        <explicitInput target="e[57]" input="baseline_e" destination="synapses"/>
        <explicitInput target="e[58]" input="baseline_e" destination="synapses"/>
        <explicitInput target="e[59]" input="baseline_e" destination="synapses"/>
        <explicitInput target="e[60]" input="baseline_e" destination="synapses"/>
        <explicitInput target="e[61]" input="baseline_e" destination="synapses"/>
        <explicitInput target="e[62]" input="baseline_e" destination="synapses"/>
        <explicitInput target="e[63]" input="baseline_e" destination="synapses"/>
        <explicitInput target="e[64]" input="baseline_e" destination="synapses"/>
        <explicitInput target="e[65]" input="baseline_e" destination="synapses"/>
        <explicitInput target="e[66]" input="baseline_e" destination="synapses"/>
        <explicitInput target="e[67]" input="baseline_e" destination="synapses"/>
        <explicitInput target="e[68]" input="baseline_e" destination="synapses"/>
        <explicitInput target="e[69]" input="baseline_e" destination="synapses"/>
        <explicitInput target="e[70]" input="baseline_e" destination="synapses"/>
        <explicitInput target="e[71]" input="baseline_e" destination="synapses"/>
        <explicitInput target="e[72]" input="baseline_e" destination="synapses"/>
        <explicitInput target="e[73]" input="baseline_e" destination="synapses"/>
        <explicitInput target="e[74]" input="baseline_e" destination="synapses"/>
        <explicitInput target="e[75]" input="baseline_e" destination="synapses"/>
        <explicitInput target="e[76]" input="baseline_e" destination="synapses"/>
        <explicitInput target="e[77]" input="baseline_e" destination="synapses"/>
        <explicitInput target="e[78]" input="baseline_e" destination="synapses"/>
        <explicitInput target="e[79]" input="baseline_e" destination="synapses"/>
        <explicitInput target="e[80]" input="baseline_e" destination="synapses"/>
        <explicitInput target="e[81]" input="baseline_e" destination="synapses"/>
        <explicitInput target="e[82]" input="baseline_e" destination="synapses"/>
        <explicitInput target="e[83]" input="baseline_e" destination="synapses"/>
        <explicitInput target="e[84]" input="baseline_e" destination="synapses"/>
        <explicitInput target="e[85]" input="baseline_e" destination="synapses"/>
        <explicitInput target="e[86]" input="baseline_e" destination="synapses"/>
        <explicitInput target="e[87]" input="baseline_e" destination="synapses"/>
        <explicitInput target="e[88]" input="baseline_e" destination="synapses"/>
        <explicitInput target="e[89]" input="baseline_e" destination="synapses"/>
        <explicitInput target="e[90]" input="baseline_e" destination="synapses"/>
        <explicitInput target="e[91]" input="baseline_e" destination="synapses"/>
        <explicitInput target="e[92]" input="baseline_e" destination="synapses"/>
        <explicitInput target="e[93]" input="baseline_e" destination="synapses"/>
        <explicitInput target="e[94]" input="baseline_e" destination="synapses"/>
        <explicitInput target="e[95]" input="baseline_e" destination="synapses"/>
        <explicitInput target="e[96]" input="baseline_e" destination="synapses"/>
        <explicitInput target="e[97]" input="baseline_e" destination="synapses"/>
        <explicitInput target="e[98]" input="baseline_e" destination="synapses"/>
        <explicitInput target="e[99]" input="baseline_e" destination="synapses"/>
        <explicitInput target="e[100]" input="baseline_e" destination="synapses"/>
        <explicitInput target="e[101]" input="baseline_e" destination="synapses"/>
        <explicitInput target="e[102]" input="baseline_e" destination="synapses"/>
        <explicitInput target="e[103]" input="baseline_e" destination="synapses"/>
        <explicitInput target="e[104]" input="baseline_e" destination="synapses"/>
        <explicitInput target="e[105]" input="baseline_e" destination="synapses"/>
        <explicitInput target="e[106]" input="baseline_e" destination="synapses"/>
        <explicitInput target="e[107]" input="baseline_e" destination="synapses"/>
        <explicitInput target="e[108]" input="baseline_e" destination="synapses"/>
        <explicitInput target="e[109]" input="baseline_e" destination="synapses"/>
        <explicitInput target="e[110]" input="baseline_e" destination="synapses"/>
        <explicitInput target="e[111]" input="baseline_e" destination="synapses"/>
        <explicitInput target="e[112]" input="baseline_e" destination="synapses"/>
        <explicitInput target="e[113]" input="baseline_e" destination="synapses"/>
        <explicitInput target="e[114]" input="baseline_e" destination="synapses"/>
        <explicitInput target="e[115]" input="baseline_e" destination="synapses"/>
        <explicitInput target="e[116]" input="baseline_e" destination="synapses"/>
        <explicitInput target="e[117]" input="baseline_e" destination="synapses"/>
        <explicitInput target="e[118]" input="baseline_e" destination="synapses"/>
        <explicitInput target="e[119]" input="baseline_e" destination="synapses"/>
        <explicitInput target="e[120]" input="baseline_e" destination="synapses"/>
        <explicitInput target="e[121]" input="baseline_e" destination="synapses"/>
        <explicitInput target="e[122]" input="baseline_e" destination="synapses"/>
        <explicitInput target="e[123]" input="baseline_e" destination="synapses"/>
        <explicitInput target="e[124]" input="baseline_e" destination="synapses"/>
        <explicitInput target="e[125]" input="baseline_e" destination="synapses"/>
        <explicitInput target="e[126]" input="baseline_e" destination="synapses"/>
        <explicitInput target="e[127]" input="baseline_e" destination="synapses"/>
        <explicitInput target="e[128]" input="baseline_e" destination="synapses"/>
        <explicitInput target="e[129]" input="baseline_e" destination="synapses"/>
        <explicitInput target="e[130]" input="baseline_e" destination="synapses"/>
        <explicitInput target="e[131]" input="baseline_e" destination="synapses"/>
        <explicitInput target="e[132]" input="baseline_e" destination="synapses"/>
        <explicitInput target="e[133]" input="baseline_e" destination="synapses"/>
        <explicitInput target="e[134]" input="baseline_e" destination="synapses"/>
        <explicitInput target="e[135]" input="baseline_e" destination="synapses"/>
        <explicitInput target="e[136]" input="baseline_e" destination="synapses"/>
        <explicitInput target="e[137]" input="baseline_e" destination="synapses"/>
        <explicitInput target="e[138]" input="baseline_e" destination="synapses"/>
        <explicitInput target="e[139]" input="baseline_e" destination="synapses"/>
        <explicitInput target="e[140]" input="baseline_e" destination="synapses"/>
        <explicitInput target="e[141]" input="baseline_e" destination="synapses"/>
        <explicitInput target="e[142]" input="baseline_e" destination="synapses"/>
        <explicitInput target="e[143]" input="baseline_e" destination="synapses"/>
        <explicitInput target="e[144]" input="baseline_e" destination="synapses"/>
        <explicitInput target="e[145]" input="baseline_e" destination="synapses"/>
        <explicitInput target="e[146]" input="baseline_e" destination="synapses"/>
        <explicitInput target="e[147]" input="baseline_e" destination="synapses"/>
        <explicitInput target="e[148]" input="baseline_e" destination="synapses"/>
        <explicitInput target="e[149]" input="baseline_e" destination="synapses"/>
        <explicitInput target="e[150]" input="baseline_e" destination="synapses"/>
        <explicitInput target="e[151]" input="baseline_e" destination="synapses"/>
        <explicitInput target="e[152]" input="baseline_e" destination="synapses"/>
        <explicitInput target="e[153]" input="baseline_e" destination="synapses"/>
        <explicitInput target="e[154]" input="baseline_e" destination="synapses"/>
        <explicitInput target="e[155]" input="baseline_e" destination="synapses"/>
        <explicitInput target="e[156]" input="baseline_e" destination="synapses"/>
        <explicitInput target="e[157]" input="baseline_e" destination="synapses"/>
        <explicitInput target="e[158]" input="baseline_e" destination="synapses"/>
        <explicitInput target="e[159]" input="baseline_e" destination="synapses"/>
        <explicitInput target="e[160]" input="baseline_e" destination="synapses"/>
        <explicitInput target="e[161]" input="baseline_e" destination="synapses"/>
        <explicitInput target="e[162]" input="baseline_e" destination="synapses"/>
        <explicitInput target="e[163]" input="baseline_e" destination="synapses"/>
        <explicitInput target="e[164]" input="baseline_e" destination="synapses"/>
        <explicitInput target="e[165]" input="baseline_e" destination="synapses"/>
        <explicitInput target="e[166]" input="baseline_e" destination="synapses"/>
        <explicitInput target="e[167]" input="baseline_e" destination="synapses"/>
        <explicitInput target="e[168]" input="baseline_e" destination="synapses"/>
        <explicitInput target="e[169]" input="baseline_e" destination="synapses"/>
        <explicitInput target="e[170]" input="baseline_e" destination="synapses"/>
        <explicitInput target="e[171]" input="baseline_e" destination="synapses"/>
        <explicitInput target="e[172]" input="baseline_e" destination="synapses"/>
        <explicitInput target="e[173]" input="baseline_e" destination="synapses"/>
        <explicitInput target="e[174]" input="baseline_e" destination="synapses"/>
        <explicitInput target="e[175]" input="baseline_e" destination="synapses"/>
        <explicitInput target="e[176]" input="baseline_e" destination="synapses"/>
        <explicitInput target="e[177]" input="baseline_e" destination="synapses"/>
        <explicitInput target="e[178]" input="baseline_e" destination="synapses"/>
        <explicitInput target="e[179]" input="baseline_e" destination="synapses"/>
        <explicitInput target="e[180]" input="baseline_e" destination="synapses"/>
        <explicitInput target="e[181]" input="baseline_e" destination="synapses"/>
        <explicitInput target="e[182]" input="baseline_e" destination="synapses"/>
        <explicitInput target="e[183]" input="baseline_e" destination="synapses"/>
        <explicitInput target="e[184]" input="baseline_e" destination="synapses"/>
        <explicitInput target="e[185]" input="baseline_e" destination="synapses"/>
        <explicitInput target="e[186]" input="baseline_e" destination="synapses"/>
        <explicitInput target="e[187]" input="baseline_e" destination="synapses"/>
        <explicitInput target="e[188]" input="baseline_e" destination="synapses"/>
        <explicitInput target="e[189]" input="baseline_e" destination="synapses"/>
        <explicitInput target="e[190]" input="baseline_e" destination="synapses"/>
        <explicitInput target="e[191]" input="baseline_e" destination="synapses"/>
        <explicitInput target="e[192]" input="baseline_e" destination="synapses"/>
        <explicitInput target="e[193]" input="baseline_e" destination="synapses"/>
        <explicitInput target="e[194]" input="baseline_e" destination="synapses"/>
        <explicitInput target="e[195]" input="baseline_e" destination="synapses"/>
        <explicitInput target="e[196]" input="baseline_e" destination="synapses"/>
        <explicitInput target="e[197]" input="baseline_e" destination="synapses"/>
        <explicitInput target="e[198]" input="baseline_e" destination="synapses"/>
        <explicitInput target="e[199]" input="baseline_e" destination="synapses"/>
        <explicitInput target="pv[0]" input="baseline_pv" destination="synapses"/>
        <explicitInput target="pv[1]" input="baseline_pv" destination="synapses"/>
        <explicitInput target="pv[2]" input="baseline_pv" destination="synapses"/>
        <explicitInput target="pv[3]" input="baseline_pv" destination="synapses"/>
        <explicitInput target="pv[4]" input="baseline_pv" destination="synapses"/>
        <explicitInput target="pv[5]" input="baseline_pv" destination="synapses"/>
        <explicitInput target="pv[6]" input="baseline_pv" destination="synapses"/>
        <explicitInput target="pv[7]" input="baseline_pv" destination="synapses"/>
        <explicitInput target="pv[8]" input="baseline_pv" destination="synapses"/>
        <explicitInput target="pv[9]" input="baseline_pv" destination="synapses"/>
        <explicitInput target="pv[10]" input="baseline_pv" destination="synapses"/>
        <explicitInput target="pv[11]" input="baseline_pv" destination="synapses"/>
        <explicitInput target="pv[12]" input="baseline_pv" destination="synapses"/>
        <explicitInput target="pv[13]" input="baseline_pv" destination="synapses"/>
        <explicitInput target="pv[14]" input="baseline_pv" destination="synapses"/>
        <explicitInput target="pv[15]" input="baseline_pv" destination="synapses"/>
        <explicitInput target="pv[16]" input="baseline_pv" destination="synapses"/>
        <explicitInput target="pv[17]" input="baseline_pv" destination="synapses"/>
        <explicitInput target="pv[18]" input="baseline_pv" destination="synapses"/>
        <explicitInput target="pv[19]" input="baseline_pv" destination="synapses"/>
        <explicitInput target="pv[20]" input="baseline_pv" destination="synapses"/>
        <explicitInput target="pv[21]" input="baseline_pv" destination="synapses"/>
        <explicitInput target="pv[22]" input="baseline_pv" destination="synapses"/>
        <explicitInput target="pv[23]" input="baseline_pv" destination="synapses"/>
        <explicitInput target="pv[24]" input="baseline_pv" destination="synapses"/>
        <explicitInput target="sst[0]" input="baseline_sst" destination="synapses"/>
        <explicitInput target="sst[1]" input="baseline_sst" destination="synapses"/>
        <explicitInput target="sst[2]" input="baseline_sst" destination="synapses"/>
        <explicitInput target="sst[3]" input="baseline_sst" destination="synapses"/>
        <explicitInput target="sst[4]" input="baseline_sst" destination="synapses"/>
        <explicitInput target="sst[5]" input="baseline_sst" destination="synapses"/>
        <explicitInput target="sst[6]" input="baseline_sst" destination="synapses"/>
        <explicitInput target="sst[7]" input="baseline_sst" destination="synapses"/>
        <explicitInput target="sst[8]" input="baseline_sst" destination="synapses"/>
        <explicitInput target="sst[9]" input="baseline_sst" destination="synapses"/>
        <explicitInput target="sst[10]" input="baseline_sst" destination="synapses"/>
        <explicitInput target="sst[11]" input="baseline_sst" destination="synapses"/>
        <explicitInput target="vip[0]" input="baseline_vip" destination="synapses"/>
        <explicitInput target="vip[1]" input="baseline_vip" destination="synapses"/>
        <explicitInput target="vip[2]" input="baseline_vip" destination="synapses"/>
        <explicitInput target="vip[3]" input="baseline_vip" destination="synapses"/>
        <explicitInput target="vip[4]" input="baseline_vip" destination="synapses"/>
        <explicitInput target="vip[5]" input="baseline_vip" destination="synapses"/>
        <explicitInput target="vip[6]" input="baseline_vip" destination="synapses"/>
        <explicitInput target="vip[7]" input="baseline_vip" destination="synapses"/>
        <explicitInput target="vip[8]" input="baseline_vip" destination="synapses"/>
        <explicitInput target="vip[9]" input="baseline_vip" destination="synapses"/>
        <explicitInput target="vip[10]" input="baseline_vip" destination="synapses"/>
        <explicitInput target="vip[11]" input="baseline_vip" destination="synapses"/>
    </network>
</neuroml>
